*Heading
** Job name: A320 Model name: Model-1
** Generated by: Abaqus/CAE 2016
*Preprint, echo=NO, model=NO, history=NO, contact=NO
**
** PARTS
**
*Part, name=A320
*Node
      1,        2771.,           0.,        112.5
      2,        2681.,           0.,        112.5
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*Element, type=S4R
 1,   1,  29, 831,  46
 2,  29,  30, 832, 831
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*Nset, nset=Skin
    1,    2,    3,    4,    5,    6
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*Elset, elset=Skin
    1,    2,    3,    4,    5,    6
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*Nset, nset=Spar
    3,    4,    6,    8,   10,   13
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*Elset, elset=Spar
 1785, 1786, 1787, 1788, 1789, 1790
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** Section: Skin
*Shell Section, elset=Skin, material=Aluminium
1.65, 5
** Section: Spar
*Shell Section, elset=Spar, material=Aluminium
2.9, 5
*End Part
**
**
** ASSEMBLY
**
*Assembly, name=Assembly
**
*Instance, name=A320-1, part=A320
*End Instance
**
*Node
      1,         153.,           0.,           0.
*Node
      2,        1141.,        112.5,        112.5
*Node
      3,        1281.,           0.,           0.
*Node
      4,        1421.,        112.5,        112.5
*Node
      5,        2681.,           0.,           0.
*Node
      6,           0.,           0.,       -24.25
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*Nset, nset=Hinge_2, instance=A320-1
   7,   8,  22,  23, 156, 157
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*Nset, nset=Point_6, instance=A320-1
  11,  14,  27,  28, 199, 200
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*Nset, nset=Point_7, instance=A320-1
  239,  254,  670,  726, 1267, 1306
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*Nset, nset=Point_8, instance=A320-1
  228,  265,  659,  715, 1256, 1295
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*Nset, nset=Point_9, instance=A320-1
  216,  277,  647,  703, 1244, 1283
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*Nset, nset=Point_10, instance=A320-1
  205,  288,  636,  692, 1233, 1272
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*Nset, nset=Point_11, instance=A320-1
  166,  520,  548, 1143, 1148, 1153
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*Nset, nset=Point_12, instance=A320-1
   86,  111,  372,  449,  888,  937
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*Nset, nset=Point_13, instance=A320-1
   75,  122,  383,  460,  877,  926
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*Nset, nset=Point_14, instance=A320-1
   64,  133,  394,  471,  866,  915
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*Nset, nset=Point_15, instance=A320-1
   53,  144,  405,  482,  855,  904
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*Nset, nset=Point_16, instance=A320-1
   1,   4,  18,  19,  41,  42
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*Nset, nset=Rib_A, instance=A320-1
  12,  13,  15,  26, 188, 189
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*Nset, nset=Rib_B, instance=A320-1
   9,  10,  24,  25, 172, 173
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*Nset, nset=Rib_C, instance=A320-1
   5,   6,  20,  21,  96,  97
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*Nset, nset=Rib_D, instance=A320-1
   2,   3,  16,  17,  32,  33
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*Nset, nset=Set-33
 1,
*Nset, nset=Set-34
 3,
*Nset, nset=Set-35
 5,
*Nset, nset=Set-36
 2,
*Nset, nset=Set-37
 4,
*Nset, nset=Set-38
 6,
*Nset, nset=Set-39
 16,
*Nset, nset=Set-40
 7,
*Nset, nset=Set-41
 8,
*Nset, nset=Set-42
 9,
*Nset, nset=Set-43
 10,
*Nset, nset=Set-44
 11,
*Nset, nset=Set-45
 11,
*Nset, nset=Set-46
 12,
*Nset, nset=Set-47
 13,
*Nset, nset=Set-48
 14,
*Nset, nset=Set-49
 15,
*Nset, nset=Set-50
 14,
*Nset, nset=Set-51
 2,
*Nset, nset=Set-52
 6,
*Nset, nset=Set-53
 16,
*Nset, nset=Set-54
 7,
*Nset, nset=Set-55
 8,
*Nset, nset=Set-56
 9,
*Nset, nset=Set-57
 10,
*Nset, nset=Set-58
 11,
*Nset, nset=Set-59
 12,
*Nset, nset=Set-60
 13,
*Nset, nset=Set-61
 14,
*Nset, nset=Set-62
 15,
*Nset, nset=Set-63
 4,
*Nset, nset=m_Set-17
 1,
*Nset, nset=m_Set-18
 2,
*Nset, nset=m_Set-19
 3,
*Nset, nset=m_Set-20
 4,
*Nset, nset=m_Set-21
 5,
*Nset, nset=m_Set-22
 6,
*Nset, nset=m_Set-23
 7,
*Nset, nset=m_Set-24
 8,
*Nset, nset=m_Set-25
 9,
*Nset, nset=m_Set-26
 10,
*Nset, nset=m_Set-27
 11,
*Nset, nset=m_Set-28
 12,
*Nset, nset=m_Set-29
 13,
*Nset, nset=m_Set-30
 14,
*Nset, nset=m_Set-31
 15,
*Nset, nset=m_Set-32
 16,
*Surface, type=NODE, name=Rib_A_CNS_, internal
Rib_A, 1.
*Surface, type=NODE, name=Rib_B_CNS_, internal
Rib_B, 1.
*Surface, type=NODE, name=Hinge_2_CNS_, internal
Hinge_2, 1.
*Surface, type=NODE, name=Rib_C_CNS_, internal
Rib_C, 1.
*Surface, type=NODE, name=Rib_D_CNS_, internal
Rib_D, 1.
*Surface, type=NODE, name=Point_6_CNS_, internal
Point_6, 1.
*Surface, type=NODE, name=Point_7_CNS_, internal
Point_7, 1.
*Surface, type=NODE, name=Point_8_CNS_, internal
Point_8, 1.
*Surface, type=NODE, name=Point_9_CNS_, internal
Point_9, 1.
*Surface, type=NODE, name=Point_10_CNS_, internal
Point_10, 1.
*Surface, type=NODE, name=Point_11_CNS_, internal
Point_11, 1.
*Surface, type=NODE, name=Point_12_CNS_, internal
Point_12, 1.
*Surface, type=NODE, name=Point_13_CNS_, internal
Point_13, 1.
*Surface, type=NODE, name=Point_14_CNS_, internal
Point_14, 1.
*Surface, type=NODE, name=Point_15_CNS_, internal
Point_15, 1.
*Surface, type=NODE, name=Point_16_CNS_, internal
Point_16, 1.
** Constraint: Constraint-1
*MPC
BEAM, Rib_A, m_Set-17
** Constraint: Constraint-2
*MPC
BEAM, Rib_B, m_Set-18
** Constraint: Constraint-3
*MPC
BEAM, Hinge_2, m_Set-19
** Constraint: Constraint-4
*MPC
BEAM, Rib_C, m_Set-20
** Constraint: Constraint-5
*MPC
BEAM, Rib_D, m_Set-21
** Constraint: Constraint-6
*MPC
BEAM, Point_6, m_Set-22
** Constraint: Constraint-7
*MPC
BEAM, Point_7, m_Set-23
** Constraint: Constraint-8
*MPC
BEAM, Point_8, m_Set-24
** Constraint: Constraint-9
*MPC
BEAM, Point_9, m_Set-25
** Constraint: Constraint-10
*MPC
BEAM, Point_10, m_Set-26
** Constraint: Constraint-11
*MPC
BEAM, Point_11, m_Set-27
** Constraint: Constraint-12
*MPC
BEAM, Point_12, m_Set-28
** Constraint: Constraint-13
*MPC
BEAM, Point_13, m_Set-29
** Constraint: Constraint-14
*MPC
BEAM, Point_14, m_Set-30
** Constraint: Constraint-15
*MPC
BEAM, Point_15, m_Set-31
** Constraint: Constraint-16
*MPC
BEAM, Point_16, m_Set-32
*End Assembly
**
** MATERIALS
**
*Material, name=Aluminium
*Elastic
 73.1, 0.33
**
** BOUNDARY CONDITIONS
**
** Name: Hinge_1 Type: Displacement/Rotation
*Boundary
Set-33, 1, 1
Set-33, 2, 2
Set-33, 3, 3
** Name: Hinge_2 Type: Displacement/Rotation
*Boundary
Set-34, 1, 1
Set-34, 2, 2
Set-34, 3, 3
** Name: Hinge_3 Type: Displacement/Rotation
*Boundary
Set-35, 1, 1
Set-35, 2, 2
** ----------------------------------------------------------------
**
** STEP: RotationUp
**
*Step, name=RotationUp, nlgeom=NO
*Static
1., 1., 1e-05, 1.
**
** BOUNDARY CONDITIONS
**
** Name: Hinge_1 Type: Displacement/Rotation
*Boundary, op=NEW
Set-33, 1, 1
Set-33, 2, 2, 4.34252
** Name: Hinge_2 Type: Displacement/Rotation
*Boundary, op=NEW
Set-34, 1, 1
Set-34, 2, 2
Set-34, 3, 3
Set-34, 4, 4, 0.4538
** Name: Hinge_3 Type: Displacement/Rotation
*Boundary, op=NEW
Set-35, 1, 1
Set-35, 2, 2, 6.46457
**
** OUTPUT REQUESTS
**
*Restart, write, frequency=0
**
** FIELD OUTPUT: F-Output-1
**
*Output, field
*Node Output
CF, RF, RT, U
*Element Output, directions=YES
LE, PE, PEEQ, PEMAG, S
*Contact Output
CDISP, CSTRESS
**
** HISTORY OUTPUT: H-Output-1
**
*Output, history, variable=PRESELECT
*End Step
** ----------------------------------------------------------------
**
** STEP: Jam1
**
*Step, name=Jam1, nlgeom=NO
*Static
1., 1., 1e-05, 1.
**
** BOUNDARY CONDITIONS
**
** Name: Actuator_1 Type: Displacement/Rotation
*Boundary, fixed
Set-36, 3, 3
**
** LOADS
**
** Name: Actuator_2   Type: Concentrated force
*Cload
Set-37, 3, -91.69
** Name: Point_6   Type: Concentrated force
*Cload
Set-38, 2, -0.627
Set-38, 3, 0.
** Name: Point_7   Type: Concentrated force
*Cload
Set-40, 2, -1.254
** Name: Point_8   Type: Concentrated force
*Cload
Set-41, 2, -1.254
** Name: Point_9   Type: Concentrated force
*Cload
Set-42, 2, -1.254
** Name: Point_10   Type: Concentrated force
*Cload
Set-43, 2, -1.254
** Name: Point_11   Type: Concentrated force
*Cload
Set-45, 2, -1.254
** Name: Point_12   Type: Concentrated force
*Cload
Set-46, 2, -1.254
** Name: Point_13   Type: Concentrated force
*Cload
Set-47, 2, -1.254
** Name: Point_14   Type: Concentrated force
*Cload
Set-50, 2, -1.254
** Name: Point_15   Type: Concentrated force
*Cload
Set-49, 2, -1.254
** Name: Point_16   Type: Concentrated force
*Cload
Set-39, 2, -0.627
Set-39, 3, 0.
**
** OUTPUT REQUESTS
**
*Restart, write, frequency=0
**
** FIELD OUTPUT: F-Output-1
**
*Output, field
*Node Output
CF, RF, RT, U
*Element Output, directions=YES
LE, MISES, PE, PEEQ, PEMAG, S
*Contact Output
CDISP, CSTRESS
**
** HISTORY OUTPUT: H-Output-1
**
*Output, history, variable=PRESELECT
*End Step
** ----------------------------------------------------------------
**
** STEP: RotationDown
**
*Step, name=RotationDown, nlgeom=NO
*Static
1., 1., 1e-05, 1.
**
** BOUNDARY CONDITIONS
**
** Name: Actuator_1 Type: Displacement/Rotation
*Boundary, op=NEW
** Name: Hinge_1 Type: Displacement/Rotation
*Boundary, op=NEW
Set-33, 1, 1
Set-33, 2, 2, 4.34252
** Name: Hinge_2 Type: Displacement/Rotation
*Boundary, op=NEW
Set-34, 1, 1
Set-34, 2, 2
Set-34, 3, 3
Set-34, 4, 4, -0.3316
** Name: Hinge_3 Type: Displacement/Rotation
*Boundary, op=NEW
Set-35, 1, 1
Set-35, 2, 2, 6.46457
**
** LOADS
**
** Name: Actuator_2   Type: Concentrated force
*Cload, op=NEW
** Name: Point_6   Type: Concentrated force
*Cload, op=NEW
** Name: Point_7   Type: Concentrated force
*Cload, op=NEW
** Name: Point_8   Type: Concentrated force
*Cload, op=NEW
** Name: Point_9   Type: Concentrated force
*Cload, op=NEW
** Name: Point_10   Type: Concentrated force
*Cload, op=NEW
** Name: Point_11   Type: Concentrated force
*Cload, op=NEW
** Name: Point_12   Type: Concentrated force
*Cload, op=NEW
** Name: Point_13   Type: Concentrated force
*Cload, op=NEW
** Name: Point_14   Type: Concentrated force
*Cload, op=NEW
** Name: Point_15   Type: Concentrated force
*Cload, op=NEW
** Name: Point_16   Type: Concentrated force
*Cload, op=NEW
**
** OUTPUT REQUESTS
**
*Restart, write, frequency=0
**
** FIELD OUTPUT: F-Output-1
**
*Output, field
*Node Output
CF, RF, RT, U
*Element Output, directions=YES
LE, MISES, PE, PEEQ, PEMAG, S
*Contact Output
CDISP, CSTRESS
**
** HISTORY OUTPUT: H-Output-1
**
*Output, history, variable=PRESELECT
*End Step
** ----------------------------------------------------------------
**
** STEP: Jam2
**
*Step, name=Jam2, nlgeom=NO
*Static
1., 1., 1e-05, 1.
**
** BOUNDARY CONDITIONS
**
** Name: BC-5 Type: Displacement/Rotation
*Boundary, fixed
Set-51, 3, 3
**
** LOADS
**
** Name: Load-13   Type: Concentrated force
*Cload
Set-52, 2, 0.418
** Name: Load-14   Type: Concentrated force
*Cload
Set-53, 2, 0.418
** Name: Load-15   Type: Concentrated force
*Cload
Set-54, 2, 0.836
** Name: Load-16   Type: Concentrated force
*Cload
Set-55, 2, 0.836
** Name: Load-17   Type: Concentrated force
*Cload
Set-56, 2, 0.836
** Name: Load-18   Type: Concentrated force
*Cload
Set-57, 2, 0.836
** Name: Load-19   Type: Concentrated force
*Cload
Set-58, 2, 0.836
** Name: Load-20   Type: Concentrated force
*Cload
Set-59, 2, 0.836
** Name: Load-21   Type: Concentrated force
*Cload
Set-60, 2, 0.836
** Name: Load-22   Type: Concentrated force
*Cload
Set-61, 2, 0.836
** Name: Load-23   Type: Concentrated force
*Cload
Set-62, 2, 0.836
** Name: Load-24   Type: Concentrated force
*Cload
Set-63, 3, 91.69
**
** OUTPUT REQUESTS
**
*Restart, write, frequency=0
**
** FIELD OUTPUT: F-Output-1
**
*Output, field
*Node Output
CF, RF, RT, U
*Element Output, directions=YES
LE, MISES, PE, PEEQ, PEMAG, S
*Contact Output
CDISP, CSTRESS
**
** HISTORY OUTPUT: H-Output-1
**
*Output, history, variable=PRESELECT
*End Step
